OpenVSP model (file version 5), 4 components.
Geometry view with OpenVSP parameter names; values to 6 digits, angles in degrees, lengths in the model's unit.
Overall bounding box: X_Min=5.74453e-05 X_Len=0.289348 Y_Min=-0.260524 Y_Len=0.521049 Z_Min=-0.04 Z_Len=0.164861

Wing "LAV-1 main body"
  location (X Y Z) 0 0 0, rotation 0 0 0
  symmetric about XZ
  bounding box size 0.289348 0.294732 0.128011
  totals: TotalSpan=0.521749 TotalProjectedSpan=0.274034 TotalChord=0.117234 TotalArea=0.0656036 TotalAR=1.14467 RelativeDihedralFlag=1
  root: chord 0.208913, twist 0, airfoil file "E387"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 BaseThickChord=0.0906504 ThickChord=0.0906504
  sections:
    n  Span       Root_Chord  Tip_Chord   Area         Sweep  Sweep_Location  Dihedral  Twist  Twist_Location  tip airfoil
    1  0.0376035  0.208913    0.18208     0.00735135   30     0.25            3         0      0.25            as above
    2  0.0470044  0.18208     0.18208     0.00855856   0      0.25            0         0      0.25            as above
    3  0.0587555  0.18208     0.124581    0.00900901   40     0.6             0         0      0.25            NACA 4-series Camber=0 CamberLoc=0.2 ThickChord=0.0906504
    4  0.0587555  0.124581    0.0670821   0.00563063   40     0.6             90        0      0.25            as above
    5  0.0293777  0.0670821   0.0383326   0.00154842   40     0.6             0         0      0.25            NACA 4-series Camber=0 CamberLoc=0.2 ThickChord=0.09
    6  0.0293777  0.0383326   0.00958316  0.000703829  40     0.6             0         0      0.25            airfoil file "E387"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 BaseThickChord=0.0906504 ThickChord=0.0906504

Propeller "RearLeft", child of "LAV-1 main body"
  location (X Y Z) 0.23 0.06 0, rotation 0 0 0
  symmetric about XZ
  bounding box size 0.00397575 0.200144 0.08
  Design: Diameter=0.08 NumBlade=3 Beta34=20 UseBeta34Flag=1 Feather=0 Rotate=0 Precone=0 ReverseFlag=0 FoldAngle=0 PropMode=1 AF=151.538 CLi=0.538798 Chord=0.177656 Solidity=0.169649 ConstructXoC=0.5 FeatherAxisXoC=0.5 FeatherOffsetXoC=0
  cross sections:
    n  RadiusFrac  shape
    0  0.2         ellipse Ellipse_Height=0.0016 Ellipse_Width=0.0032
    1  0.4         NACA 16-series Chord=0.00665 IdealCl=0.7 ThickChord=0.144074
    2  1           NACA 16-series Chord=0.0052 IdealCl=0.2 ThickChord=0.03
  Chord along r/R (cubic Bezier): 0.2: 0.08, 0.333333: 0.15, 0.466667: 0.2, 0.6: 0.2, 0.716667: 0.2, 0.833333: 0.2, 0.95: 0.2, 0.966667: 0.2, 0.983333: 0.2, 1: 0.13
  Twist along r/R (PCHIP): 0.2: 46.75, 0.75: 20, 1: 13
  Thick along r/R (cubic Bezier): 0.2: 0.5, 0.233333: 0.3, 0.266667: 0.225, 0.3: 0.2, 0.4: 0.125, 0.5: 0.115, 0.6: 0.1, 0.733333: 0.075, 0.866667: 0.055, 1: 0.03
  CLI along r/R (cubic Bezier): 0.2: 0, 0.266667: 0.7, 0.333333: 0.7, 0.4: 0.7, 0.466667: 0.7, 0.533333: 0.7, 0.6: 0.7, 0.733333: 0.7, 0.866667: 0.7, 1: 0.2

Propeller "FrontLeft", child of "LAV-1 main body"
  location (X Y Z) 0.01 0.06 0, rotation 0 0 0
  symmetric about XZ
  bounding box size 0.00403565 0.200144 0.08
  Design: Diameter=0.08 NumBlade=3 Beta34=20 UseBeta34Flag=1 Feather=0 Rotate=0 Precone=0 ReverseFlag=0 FoldAngle=0 PropMode=1 AF=150.405 CLi=0.535247 Chord=0.179909 Solidity=0.1718 ConstructXoC=0.5 FeatherAxisXoC=0.5 FeatherOffsetXoC=0
  cross sections:
    n  RadiusFrac  shape
    0  0.280435    ellipse Ellipse_Height=0.0016 Ellipse_Width=0.0032
    1  0.4         NACA 16-series Chord=0.00594403 IdealCl=0.7 ThickChord=0.144074
    2  1           NACA 16-series Chord=0.0052 IdealCl=0.2 ThickChord=0.03
  Chord along r/R (cubic Bezier): 0.280435: 0.08, 0.386957: 0.15, 0.493478: 0.2, 0.6: 0.2, 0.716667: 0.2, 0.833333: 0.2, 0.95: 0.2, 0.966667: 0.2, 0.983333: 0.2, 1: 0.13
  Twist along r/R (PCHIP): 0.280435: 46.75, 0.75: 20, 1: 13
  Thick along r/R (cubic Bezier): 0.280435: 0.5, 0.286957: 0.3, 0.293478: 0.225, 0.3: 0.2, 0.4: 0.125, 0.5: 0.115, 0.6: 0.1, 0.733333: 0.075, 0.866667: 0.055, 1: 0.03
  CLI along r/R (cubic Bezier): 0.280435: 0, 0.32029: 0.7, 0.360145: 0.7, 0.4: 0.7, 0.466667: 0.7, 0.533333: 0.7, 0.6: 0.7, 0.733333: 0.7, 0.866667: 0.7, 1: 0.2

Mesh "MeshGeom"
  location (X Y Z) 0 0 0, rotation 0 0 0
  triangle mesh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

VSPAERO settings: Sref=0.0656036 bref=0.521749 cref=0.117234 Xcg=0.123628 Ycg=-0.00115977 Zcg=0.00517011 AlphaStart=1 AlphaEnd=10 AlphaNpts=6 BetaStart=0 BetaEnd=0 BetaNpts=1 MachStart=0.0728863 MachEnd=0 MachNpts=1 ReCref=1e+07 Vinf=100 Rho=0.002377
